<?xml version="1.0" ?>
<Node dt="0.01" gravity="9 0 0" name="root">
    <RequiredPlugin name="SofaOpenglVisual"/>
    <BruteForceDetection />
    <DefaultContactManager />
    <DefaultPipeline />
    <MinProximityIntersection alarmDistance="1" contactDistance="0.2"/>
    <VisualStyle displayFlags="showVisualModels showBehaviorModels showCollisionModels" />

    <Node>
        <EulerImplicitSolver name="cg odesolver" printLog="false"  rayleighStiffness="0.1" rayleighMass="0.1" />
        <CGLinearSolver iterations="100" name="linear solver" threshold="1e-20" tolerance="1e-20" />
        <!--
        <Node name="restarticulation">
            <MechanicalObject name="rest" template="Vec1d" position="0 0 0 0" />
            <FixedConstraint indices="0 1 2 3" />
        </Node>
        -->
        <Node name="articulation">
            <MechanicalObject name="Articulations" template="Vec1d" position="0 0 0 0" />
            <Node>
                <!--<MechanicalObject template="Rigid3d" name="DOFs" position="0 0 0  0 0 0 1    1 0 0  0 0 0 1    3 0 0  0 0 0 1    5 0 0  0 0 0 1    7 0 0  0 0 0 1" />-->
                <MechanicalObject template="Rigid3d" name="DOFs" position="0 0 0  0 0 0 1    1 0 0  0 0 0 1    3 0 0  0 0 0 1    5 0 0  0 0 0 1    7 0 0  0 0 0 1" />

                <!--<MeshTopology name="lines" lines="0 1 1 2 2 3 3 4 " />-->
                <MeshTopology name="lines" lines="0 1 1 2 2 3 3 4 " />
                <UniformMass template="Rigid3d" name="mass" totalMass="1" />

                <BeamFEMForceField name="FEM" radius="0.1" youngModulus="1e8" poissonRatio="0.45"/>
<!--
                <FixedConstraint template="Rigid3d" name="fixOrigin" indices="0" />-->
                <ArticulatedSystemMapping input1="@../Articulations" output="@DOFs" />


                <Node name="Collision">
                    <MechanicalObject template="Vec3d" position="-1 -0.5 -0.5 -1 0.5 -0.5 -1 0.5 0.5 -1 -0.5 0.5 1 -0.5 -0.5 1 0.5 -0.5 1 0.5 0.5 1 -0.5 0.5 -1 -0.5 -0.5 -1 0.5 -0.5 -1 0.5 0.5 -1 -0.5 0.5 1 -0.5 -0.5 1 0.5 -0.5 1 0.5 0.5 1 -0.5 0.5 -1 -0.5 -0.5 -1 0.5 -0.5 -1 0.5 0.5 -1 -0.5 0.5 1 -0.5 -0.5 1 0.5 -0.5 1 0.5 0.5 1 -0.5 0.5 -1 -0.5 -0.5 -1 0.5 -0.5 -1 0.5 0.5 -1 -0.5 0.5 1 -0.5 -0.5 1 0.5 -0.5 1 0.5 0.5 1 -0.5 0.5" />
                    <MeshTopology lines="0 1 1 2 2 3 3 0 1 5 5 4 4 0 5 6 6 7 7 4 2 6 7 3 8 9 9 10 10 11 11 8 9 13 13 12 12 8 13 14 14 15 15 12 10 14 15 11 16 17 17 18 18 19 19 16 17 21 21 20 20 16 21 22 22 23 23 20 18 22 23 19 24 25 25 26 26 27 27 24 25 29 29 28 28 24 29 30 30 31 31 28 26 30 31 27"
                    triangles="3 1 0 3 2 1 3 6 2 3 7 6 7 5 6 7 4 5 4 1 5 4 0 1 5 1 2 2 6 5 4 7 3 4 3 0 11 9 8 11 10 9 11 14 10 11 15 14 15 13 14 15 12 13 12 9 13 12 8 9 13 9 10 10 14 13 12 15 11 12 11 8 19 17 16 19 18 17 19 22 18 19 23 22 23 21 22 23 20 21 20 17 21 20 16 17 21 17 18 18 22 21 20 23 19 20 19 16 27 25 24 27 26 25 27 30 26 27 31 30 31 29 30 31 28 29 28 25 29 28 24 25 29 25 26 26 30 29 28 31 27 28 27 24" />

                    <TriangleCollisionModel />
                    <LineCollisionModel />

                    <RigidMapping rigidIndexPerPoint="1 1 1 1 1 1 1 1 2 2 2 2 2 2 2 2 3 3 3 3 3 3 3 3 4 4 4 4 4 4 4 4" input="@.." output="@." />
                </Node>
                <!--
                <RigidMapping rigidIndexPerPoint="0 8 8 8 8" />
                -->

                <Node name="Visu">
                    <OglModel name="Visual" position="-1 -0.5 -0.5 -1 0.5 -0.5 -1 0.5 0.5 -1 -0.5 0.5 1 -0.5 -0.5 1 0.5 -0.5 1 0.5 0.5 1 -0.5 0.5 -1 -0.5 -0.5 -1 0.5 -0.5 -1 0.5 0.5 -1 -0.5 0.5 1 -0.5 -0.5 1 0.5 -0.5 1 0.5 0.5 1 -0.5 0.5 -1 -0.5 -0.5 -1 0.5 -0.5 -1 0.5 0.5 -1 -0.5 0.5 1 -0.5 -0.5 1 0.5 -0.5 1 0.5 0.5 1 -0.5 0.5 -1 -0.5 -0.5 -1 0.5 -0.5 -1 0.5 0.5 -1 -0.5 0.5 1 -0.5 -0.5 1 0.5 -0.5 1 0.5 0.5 1 -0.5 0.5"
                    triangles="3 1 0 3 2 1 3 6 2 3 7 6 7 5 6 7 4 5 4 1 5 4 0 1 5 1 2 2 6 5 4 7 3 4 3 0 11 9 8 11 10 9 11 14 10 11 15 14 15 13 14 15 12 13 12 9 13 12 8 9 13 9 10 10 14 13 12 15 11 12 11 8 19 17 16 19 18 17 19 22 18 19 23 22 23 21 22 23 20 21 20 17 21 20 16 17 21 17 18 18 22 21 20 23 19 20 19 16 27 25 24 27 26 25 27 30 26 27 31 30 31 29 30 31 28 29 28 25 29 28 24 25 29 25 26 26 30 29 28 31 27 28 27 24" />
                    <RigidMapping rigidIndexPerPoint="1 1 1 1 1 1 1 1 2 2 2 2 2 2 2 2 3 3 3 3 3 3 3 3 4 4 4 4 4 4 4 4" input="@.." output="@Visual" />
                </Node>
            </Node>
            <ArticulatedHierarchyContainer />

            <Node name="articulationCenters">
                <Node name="articulationCenter1">
                    <ArticulationCenter parentIndex="0" childIndex="1" posOnParent="0 0 0" posOnChild="-1 0 0" articulationProcess="2" />
                    <Node name="articulations">
                        <Articulation translation="1" rotation="0" rotationAxis="1 0 0" articulationIndex="0" />
                    </Node>
                </Node>
                <Node name="articulationCenter2">
                    <ArticulationCenter parentIndex="1" childIndex="2" posOnParent="1 0 0" posOnChild="-1 0 0" articulationProcess="2" />
                    <Node name="articulations">
                        <Articulation translation="1" rotation="0" rotationAxis="1 0 0" articulationIndex="1" />
                    </Node>
                </Node>

                <Node name="articulationCenter3">
                    <ArticulationCenter parentIndex="2" childIndex="3" posOnParent="1 0 0" posOnChild="-1 0 0" articulationProcess="2" />
                    <Node name="articulations">
                        <Articulation translation="1" rotation="0" rotationAxis="1 0 0" articulationIndex="2" />
                    </Node>
                </Node>
                <Node name="articulationCenter4">
                    <ArticulationCenter parentIndex="3" childIndex="4" posOnParent="1 0 0" posOnChild="-1 0 0" articulationProcess="0" />
                    <Node name="articulations">
                        <Articulation translation="1" rotation="0" rotationAxis="1 0 0" articulationIndex="3" />
                    </Node>
                </Node>
            </Node>

        </Node>

        <!--
        <StiffSpringForceField name="Spring" object1="@articulation" object2="@restarticulation" spring=" 1 1 100.0 1.0 0.0  2 2 100.0 1.0 0.0  3 3 100.0 1.0 0.0" />
        -->
    </Node>


    <RegularGridTopology name="grid_1" n="10 2 10" min="-10 -5 -10" max="10 -3 10" />
    <Node name="Cube">
        <MechanicalObject src="@../grid_1" name="Volume" />

        <TetrahedronSetTopologyContainer name="Tetra_topo" />
        <TetrahedronSetTopologyModifier name="Modifier" />
        <TetrahedronSetTopologyAlgorithms name="TopoAlgo" template="Vec3d" />
        <TetrahedronSetGeometryAlgorithms name="GeomAlgo" template="Vec3d" drawEdges="0" drawScaleTetrahedra="0.8"/>

        <Hexa2TetraTopologicalMapping name="default28" input="@../grid_1" output="@Tetra_topo" />

        <Node name="Surface">
            <TriangleSetTopologyContainer  name="Container"  fileTopology="" tags=" " />
            <TriangleSetTopologyModifier   name="Modifier" />
            <TriangleSetTopologyAlgorithms name="TopoAlgo"   template="Vec3d" />
            <TriangleSetGeometryAlgorithms name="GeomAlgo"   template="Vec3d" drawTriangles="0"/>
            <Tetra2TriangleTopologicalMapping input="@../Tetra_topo" output="@Container" />

            <TriangleCollisionModel simulated="0" moving="0" bothSide="false" group="1"/>
            <LineCollisionModel simulated="0" moving="0" group="1" />
            <PointCollisionModel simulated="0" moving="0" group="1"/>

            <Node name="VisuSurface">
                <OglModel name="Visual" color="1.000 1.000 1.000 1.0" />
                <BarycentricMapping input="@.." output="@Visual" />
            </Node>
        </Node>
    </Node>
</Node>
