<?xml version="1.0" ?>
<Node dt="0.01" gravity="0 0 0" name="root">
    <RequiredPlugin name="SofaOpenglVisual"/>
    <RequiredPlugin name='SofaBoundaryCondition'/>
    <RequiredPlugin name='SofaGeneralRigid'/>
    <RequiredPlugin name='SofaConstraint'/>
    <RequiredPlugin name="SofaHapticAvatar"/>

    <BruteForceDetection />
    <DefaultContactManager />
    <DefaultPipeline />
    <MinProximityIntersection alarmDistance="1" contactDistance="0.2"/>
    <VisualStyle displayFlags="showVisualModels showBehaviorModels showCollisionModels" />

    <HapticAvatar_PortalManager name="portalMgr" configFilename="./config/PortalSetup.xml" printLog="1" />
    <HapticAvatar_ArticulatedDeviceEmulator name="HA_Emulator" portName="//./COM3" portalManager="@portalMgr"/>


    <EulerImplicitSolver name="cg odesolver" printLog="false"  rayleighStiffness="0.1" rayleighMass="0.1" />
    <CGLinearSolver iterations="100" name="linear solver" threshold="1e-20" tolerance="1e-20" />

    <Node name="Tool">
        <Node name="Rest_articulation">
            <MechanicalObject name="rest" template="Vec1d" position="0 0 0 0" />
            <FixedConstraint indices="0 1 2 3" />
        </Node>

        <Node name="Articulation">
            <MechanicalObject name="Articulations" template="Vec1d" position="0 0 0 0 0 0" rest_position="@../../HA_Emulator.articulations"/>
            <RestShapeSpringsForceField points="0 1 2 3 4 5" stiffness="1000 1000 1000 1000 1000 1000" printLog="true"/>
            <UniformMass totalMass="0.01"/>
            <UncoupledConstraintCorrection />

            <Node name="Models">
                <MechanicalObject template="Rigid3d" name="DOFs"
                position="0 0 0  0 0 0 1
                0 0 0  0 0 0 1
                0 0 0  0 0 0 1
                0 0 0  0 0 0 1
                0 0 0  0 0 0 1
                0 0 0  0 0 0 1" />
                <ArticulatedSystemMapping input1="@../Articulations" output="@DOFs" />

                <Node name="Device_base">
                    <MeshObjLoader filename="./mesh/Haptic_device_base.obj"  name="loader"/>
                    <MechanicalObject template="Vec3d" position="@loader.position" />
                    <MeshTopology src="@loader"/>

                    <RigidMapping input="@.." output="@." index="0"/>
                    <Node name="Visu">
                        <OglModel name="Visual" src="@../loader" />
                        <IdentityMapping />
                    </Node>
                </Node>


                <Node name="Device_head">
                    <MeshObjLoader filename="./mesh/Haptic_device_head.obj"  name="loader"/>
                    <MechanicalObject template="Vec3d" position="@loader.position" />
                    <MeshTopology src="@loader"/>
                    <RigidMapping input="@.." output="@." index="1"/>
                    <Node name="Visu">
                        <OglModel name="Visual" src="@../loader" />
                        <IdentityMapping />
                    </Node>
                </Node>

                <Node name="Device_portal">
                    <MeshObjLoader filename="./mesh/Haptic_device_portal.obj"  name="loader"/>
                    <MechanicalObject template="Vec3d" position="@loader.position" />
                    <MeshTopology src="@loader"/>
                    <RigidMapping input="@.." output="@." index="2"/>
                    <Node name="Visu">
                        <OglModel name="Visual" src="@../loader" />
                        <IdentityMapping />
                    </Node>
                </Node>

                <Node name="Grasper_shaft">
                    <MeshObjLoader filename="./mesh/Haptic_grasper_shaft.obj"  name="loader"/>
                    <MechanicalObject template="Vec3d" position="@loader.position" />
                    <MeshTopology src="@loader"/>

                    <TriangleCollisionModel group="0"/>
                    <LineCollisionModel group="0"/>
                    <PointCollisionModel group="0"/>

                    <RigidMapping input="@.." output="@." index="3"/>
                    <Node name="Visu">
                        <OglModel name="Visual" src="@../loader" />
                        <IdentityMapping />
                    </Node>
                </Node>


                <Node name="Grasper_jaws_up">
                    <MeshObjLoader filename="./mesh/Haptic_grasper_jaws_up.obj"  name="loader"/>
                    <MechanicalObject template="Vec3d" position="@loader.position" />
                    <MeshTopology src="@loader"/>

                    <TriangleCollisionModel group="0"/>
                    <LineCollisionModel group="0"/>
                    <PointCollisionModel group="0"/>

                    <RigidMapping input="@.." output="@." index="4"/>
                    <Node name="Visu">
                        <OglModel name="Visual" src="@../loader" />
                        <IdentityMapping />
                    </Node>
                </Node>


                <Node name="Grasper_jaws_down">
                    <MeshObjLoader filename="./mesh/Haptic_grasper_jaws_down.obj"  name="loader"/>
                    <MechanicalObject template="Vec3d" position="@loader.position" />
                    <MeshTopology src="@loader"/>

                    <TriangleCollisionModel group="0"/>
                    <LineCollisionModel group="0"/>
                    <PointCollisionModel group="0"/>


                    <RigidMapping input="@.." output="@." index="5"/>
                    <Node name="Visu">
                        <OglModel name="Visual" src="@../loader" />
                        <IdentityMapping />
                    </Node>
                </Node>

            </Node>

            <ArticulatedHierarchyContainer />
            <Node name="articulationCenters">
                <Node name="articulationCenter1">
                    <ArticulationCenter parentIndex="0" childIndex="1" posOnParent="0 0 0" posOnChild="0 0 0" articulationProcess="0" />
                    <Node name="articulations1">
                        <Articulation translation="0" rotation="1" rotationAxis="0 1 0" articulationIndex="0" />
                    </Node>
                </Node>
                <Node name="articulationCenter2">
                    <ArticulationCenter parentIndex="1" childIndex="2" posOnParent="0 0 0" posOnChild="0 0 0" articulationProcess="0" />
                    <Node name="articulations2">
                        <Articulation translation="0" rotation="1" rotationAxis="1 0 0" articulationIndex="1" />
                    </Node>
                </Node>

                <Node name="articulationCenter3">
                    <ArticulationCenter parentIndex="2" childIndex="3" posOnParent="0 9 0" posOnChild="0 9 0" articulationProcess="0" />
                    <Node name="articulations3">
                        <Articulation translation="0" rotation="1" rotationAxis="0 0 1" articulationIndex="2" />
                        <Articulation translation="1" rotation="0" rotationAxis="0 0 1" articulationIndex="3" />
                    </Node>
                </Node>

                <Node name="articulationCenter4">
                    <ArticulationCenter parentIndex="3" childIndex="4" posOnParent="0 0 -20" posOnChild="0 0 -20" articulationProcess="0" />
                    <Node name="articulations4">
                        <Articulation translation="0" rotation="1" rotationAxis="0 1 0" articulationIndex="4" />
                    </Node>
                </Node>

                <Node name="articulationCenter5">
                    <ArticulationCenter parentIndex="3" childIndex="5" posOnParent="0 0 -20" posOnChild="0 0 -20" articulationProcess="0" />
                    <Node name="articulations5">
                        <Articulation translation="0" rotation="1" rotationAxis="0 1 0" articulationIndex="5" />
                    </Node>
                </Node>


            </Node>
        </Node>

    </Node>

</Node>
