<?xml version="1.0" ?>
<Node dt="0.01" gravity="0 0 0" name="root">
    <VisualStyle displayFlags="showVisualModels hideBehaviorModels hideCollisionModels" />
    <DefaultVisualManagerLoop/>

    <RequiredPlugin pluginName="SofaBoundaryCondition"/> <!-- Needed to use components [FixedConstraint] -->
    <RequiredPlugin pluginName="SofaConstraint"/> <!-- Needed to use components [FreeMotionAnimationLoop, LCPConstraintSolver, LinearSolverConstraintCorrection, LocalMinDistance] -->
    <RequiredPlugin pluginName="SofaDeformable"/> <!-- Needed to use components [RestShapeSpringsForceField] -->
    <RequiredPlugin pluginName="SofaEngine"/> <!-- Needed to use components [BoxROI] -->
    <RequiredPlugin pluginName="SofaGeneralRigid"/> <!-- Needed to use components [ArticulatedHierarchyContainer, ArticulatedSystemMapping, Articulation, ArticulationCenter] -->
    <RequiredPlugin pluginName="SofaSimpleFem"/> <!-- Needed to use components [TetrahedronFEMForceField] -->
    <RequiredPlugin pluginName="SofaImplicitOdeSolver"/> <!-- Needed to use components [EulerImplicitSolver] -->
    <RequiredPlugin pluginName="SofaLoader"/> <!-- Needed to use components [MeshObjLoader] -->
    <RequiredPlugin pluginName="SofaMeshCollision"/> <!-- Needed to use components [LineCollisionModel, PointCollisionModel, TriangleCollisionModel] -->
    <RequiredPlugin pluginName="SofaOpenglVisual"/> <!-- Needed to use components [OglModel] -->
    <RequiredPlugin pluginName="SofaRigid"/> <!-- Needed to use components [RigidMapping] -->
    <RequiredPlugin pluginName="SofaSparseSolver"/> <!-- Needed to use components [SparseLDLSolver] -->
    <RequiredPlugin pluginName="SofaTopologyMapping"/> <!-- Needed to use components [Hexa2TetraTopologicalMapping, Tetra2TriangleTopologicalMapping] -->
    <RequiredPlugin pluginName="SofaHapticAvatar"/>
    <RequiredPlugin pluginName='SofaHaptics'/>

    <CollisionPipeline name="pipeline" depth="6" verbose="0"/>
    <BruteForceBroadPhase />
    <BVHNarrowPhase />
    <CollisionResponse name="response" response="FrictionContact" />
    <LocalMinDistance name="proximity" alarmDistance="2" contactDistance="0.5" />
    <FreeMotionAnimationLoop/>
    <LCPConstraintSolver tolerance="0.001" maxIt="10000"/>

    <!-- Include Device driver and 3D model -->
    <include href="ArticulatedGrasper.xml" />

    <include href="ArticulatedGrasper2.xml" />


    <!-- Add obstacles -->
    <RegularGridTopology name="grid_2" n="6 6 6" min="-50 -50 0" max="50 50 100" />
    <Node name="Cube2">
        <EulerImplicitSolver rayleighMass="0.01" rayleighStiffness="0.1" />
		<SparseLDLSolver template="CompressedRowSparseMatrixMat3x3d"/>

        <MechanicalObject src="@../grid_2" name="Volume" />

        <BoxROI name="boxRoi1" box="-100 -100 -1  100 100 1" drawBoxes="1"/>
        <FixedProjectiveConstraint indices="@boxRoi1.indices" />

        <TetrahedronSetTopologyContainer name="Tetra_topo" />
        <TetrahedronSetTopologyModifier name="Modifier" />
        <TetrahedronSetGeometryAlgorithms name="GeomAlgo" template="Vec3d" />
        <Hexa2TetraTopologicalMapping input="@../grid_2" output="@Tetra_topo" />

        <TetrahedronFEMForceField name="FEM" youngModulus="1000" poissonRatio="0.3" method="large" />
        <UniformMass totalMass="0.1" />
        <LinearSolverConstraintCorrection />

        <Node name="Surface">
            <TriangleSetTopologyContainer  name="Container"  />
            <TriangleSetTopologyModifier   name="Modifier" />
            <TriangleSetGeometryAlgorithms name="GeomAlgo"   template="Vec3d" drawTriangles="0"/>
            <Tetra2TriangleTopologicalMapping input="@../Tetra_topo" output="@Container" />

            <TriangleCollisionModel bothSide="false" group="1"/>
            <LineCollisionModel group="1" />
            <PointCollisionModel group="1"/>

            <Node name="VisuSurface">
                <OglModel name="Visual" texturename="textures/colorMap.png" />
                <IdentityMapping input="@.." output="@Visual" />
            </Node>
        </Node>
    </Node>

</Node>
