<?xml version="1.0"?>
<Node name="root" gravity="0 0 0" dt="0.01" bbox="-200 -200 -200 200 200 200">
    <VisualStyle displayFlags="showVisualModels hideBehaviorModels hideCollisionModels" />
    <DefaultVisualManagerLoop/>

    <RequiredPlugin name="SofaConstraint"/> <!-- Needed to use components [FreeMotionAnimationLoop, LCPConstraintSolver, LocalMinDistance, UncoupledConstraintCorrection] -->
    <RequiredPlugin name="SofaDeformable"/> <!-- Needed to use components [RestShapeSpringsForceField] -->
    <RequiredPlugin name="SofaGeneralRigid"/> <!-- Needed to use components [ArticulatedHierarchyContainer, ArticulatedSystemMapping, Articulation, ArticulationCenter] -->
    <RequiredPlugin name="SofaImplicitOdeSolver"/> <!-- Needed to use components [EulerImplicitSolver] -->
    <RequiredPlugin name="SofaLoader"/> <!-- Needed to use components [MeshObjLoader] -->
    <RequiredPlugin name="SofaOpenglVisual"/> <!-- Needed to use components [OglModel] -->
    <RequiredPlugin name="SofaRigid"/> <!-- Needed to use components [RigidMapping] -->
    <RequiredPlugin name="SofaHapticAvatar"/>
    <RequiredPlugin name='SofaHaptics' />


    <DefaultPipeline name="pipeline" depth="6" verbose="0"/>
    <BruteForceBroadPhase />
    <BVHNarrowPhase />
    <DefaultContactManager name="response" response="FrictionContact" />
    <LocalMinDistance name="proximity" alarmDistance="2" contactDistance="0.5" />
    <FreeMotionAnimationLoop/>
    <LCPConstraintSolver tolerance="0.001" maxIt="10000"/>

    <FreeMotionAnimationLoop/>
    <LCPConstraintSolver tolerance="0.001" maxIt="1000"/>

    <EulerImplicitSolver name="ODE solver" rayleighStiffness="0.05" rayleighMass="1.0" />
    <CGLinearSolver name="linear solver" iterations="25" tolerance="1e-10" threshold="10e-10" />

    <!-- Include Device driver and 3D model -->
    <include href="ArticulatedRigidGrasper.xml" />

</Node>
