<?xml version="1.0"?>
<Node name="root" gravity="0 0 0" dt="0.01" bbox="-200 -200 -200 200 200 200">
    <RequiredPlugin name="SofaOpenglVisual"/>
    <RequiredPlugin name="SofaHapticAvatar"/>
    <RequiredPlugin name='SofaHaptics' />
    <RequiredPlugin name='SofaSparseSolver'/>
	<VisualStyle displayFlags="showVisualModels showBehaviorModels hideCollisionModels" />

    <DefaultPipeline name="pipeline" depth="6" verbose="0"/>
    <BruteForceDetection name="detection" />
    <DefaultContactManager name="response" response="FrictionContact" />
    <LocalMinDistance name="proximity" alarmDistance="0.15" contactDistance="0.05" angleCone="0.0" />
    <FreeMotionAnimationLoop/>
    <LCPConstraintSolver tolerance="0.001" maxIt="1000"/>


    <HapticAvatar_PortalManager name="portalMgr" configFilename="./config/PortalSetup.xml" printLog="1" />
    <HapticAvatar_TipDeviceController name="HADevice" portName="//./COM3" printLog="1" portalManager="@portalMgr"
    drawDevice="1" forceScale="1"/>

    <include href="Portals.xml" />

    <Node name="tool">
        <MechanicalObject template="Rigid3d" name="DOFs" position="@../HADevice.positionDevice"/>

        <Node name="Instrument" >
            <EulerImplicitSolver name="cg_odesolver"  />
            <SparseLUSolver name="linear solver" iterations="25" tolerance="1e-09" threshold="1e-09" />

            <MechanicalObject name="instrumentState" template="Rigid3d" />
            <UniformMass name="mass" totalMass="50" />

            <LCPForceFeedback activate="true" forceCoef="0.00005"/>
            <RestShapeSpringsForceField stiffness='1000000000000' angularStiffness='1000000000000' external_rest_shape='@../DOFs' points='0' external_points='0' />
            <UncoupledConstraintCorrection/>

            <Node name="CollisionModel" tags="toolCollision">
                <MeshObjLoader filename="./mesh/Grasper.obj"  name="loader"/>
                <MeshTopology src="@loader" name="InstrumentCollisionModel" />
                <MechanicalObject src="@loader" name="instrumentCollisionState"  ry="0" rz="0" dz="0" tags="toolPosition"/>
                <SphereCollisionModel name="instrumentPoint" radius="0.2" contactStiffness="10" tags="CarvingTool" />
                <LineCollisionModel />
                <RigidMapping name="MM->CM mapping" input="@instrumentState" output="@instrumentCollisionState" />
            </Node>

            <Node name="VisualModel" >
                <MeshObjLoader name="meshLoader_1" filename="./mesh/Grasper.obj" handleSeams="1" />
                <OglModel name="InstrumentVisualModel" src="@meshLoader_1"/>
                <RigidMapping name="MM->VM mapping" input="@instrumentState" output="@InstrumentVisualModel" />
            </Node>
        </Node>
    </Node>


    <RegularGridTopology name="grid_1" n="6 6 6" min="100 0 0" max="200 100 100" />
    <Node name="Cube">
        <EulerImplicitSolver rayleighMass="0.1" rayleighStiffness="0.1" />
        <CGLinearSolver name="linear solver" iterations="25" tolerance="1e-09" threshold="1e-09" />
        <MechanicalObject src="@../grid_1" name="Volume" />

        <BoxROI name="boxRoi" box="90 -10 -10 210 10 110" drawBoxes="1"/>
        <FixedConstraint name="FixedConstraint" indices="@boxRoi.indices" />

        <TetrahedronSetTopologyContainer name="Tetra_topo" />
        <TetrahedronSetTopologyModifier name="Modifier" />
        <TetrahedronSetTopologyAlgorithms name="TopoAlgo" template="Vec3d" />
        <TetrahedronSetGeometryAlgorithms name="GeomAlgo" template="Vec3d" drawEdges="0" drawScaleTetrahedra="0.8"/>

        <Hexa2TetraTopologicalMapping name="default28" input="@../grid_1" output="@Tetra_topo" />

        <TetrahedralCorotationalFEMForceField name="FEM" youngModulus="80" poissonRatio="0.3" method="large" topology="@Tetra_topo"/>
        <UniformMass totalMass="1" />
        <UncoupledConstraintCorrection/>
        <Node name="Surface">
            <TriangleSetTopologyContainer  name="Container"  fileTopology="" tags=" " />
            <TriangleSetTopologyModifier   name="Modifier" />
            <TriangleSetTopologyAlgorithms name="TopoAlgo"   template="Vec3d" />
            <TriangleSetGeometryAlgorithms name="GeomAlgo"   template="Vec3d" drawTriangles="0"/>
            <Tetra2TriangleTopologicalMapping input="@../Tetra_topo" output="@Container" />

            <TriangleCollisionModel />
            <LineCollisionModel />

            <Node name="VisuSurface">
                <OglModel name="Visual" color="1.000 1.000 1.000 1.0" />
                <BarycentricMapping input="@.." output="@Visual" />
            </Node>
        </Node>
    </Node>


</Node>
