<?xml version="1.0"?>
<Node name="root" gravity="0 0 0" dt="0.01" bbox="-200 -200 -200 200 200 200">
    <RequiredPlugin name="SofaOpenglVisual"/>
    <RequiredPlugin name="SofaHapticAvatar"/>
    <RequiredPlugin name='SofaHaptics' />
    <RequiredPlugin name='SofaSparseSolver'/>
	<VisualStyle displayFlags="showVisualModels showBehaviorModels hideCollisionModels" />

    <DefaultPipeline name="pipeline" depth="6" verbose="0"/>
    <BruteForceDetection name="detection" />
    <DefaultContactManager name="response" response="FrictionContact" />
    <LocalMinDistance name="proximity" alarmDistance="0.15" contactDistance="0.05" angleCone="0.0" />
    <FreeMotionAnimationLoop/>
    <LCPConstraintSolver tolerance="0.001" maxIt="1000"/>


    <HapticAvatarPortalManager name="portalMgr" configFilename="./config/PortalSetup.xml" printLog="1" />
    <HapticAvatarDeviceController name="HADevice" portName="//./COM3" printLog="1" portalManager="@portalMgr"
    drawDevice="1" forceScale="1"/>

    <MeshObjLoader name="ProtalMesh" filename="mesh/Portal.obj" handleSeams="1"/>
    <Node name="Portal_1">
        <MechanicalObject name="ms" template="Rigid3d" position="@portalMgr.portalPosition1"/>
        <Node name="VisuPortal">
            <OglModel name="Visual" src="@../../ProtalMesh" />
            <RigidMapping input="@.." output="@Visual" index="0"/>
        </Node>
    </Node>

    <Node name="Portal_2">
        <MechanicalObject name="ms" template="Rigid3d" position="@portalMgr.portalPosition2"/>
        <Node name="VisuPortal">
            <OglModel name="Visual" src="@../../ProtalMesh" />
            <RigidMapping input="@.." output="@Visual" index="0"/>
        </Node>
    </Node>

    <Node name="Portal_3">
        <MechanicalObject name="ms" template="Rigid3d" position="@portalMgr.portalPosition3"/>
        <Node name="VisuPortal">
            <OglModel name="Visual" src="@../../ProtalMesh" />
            <RigidMapping input="@.." output="@Visual" index="0"/>
        </Node>
    </Node>

    <Node name="Portal_4">
        <MechanicalObject name="ms" template="Rigid3d" position="@portalMgr.portalPosition4"/>
        <Node name="VisuPortal">
            <OglModel name="Visual" src="@../../ProtalMesh" />
            <RigidMapping input="@.." output="@Visual" index="0"/>
        </Node>
    </Node>

    <Node name="Portal_5">
        <MechanicalObject name="ms" template="Rigid3d" position="@portalMgr.portalPosition5"/>
        <Node name="VisuPortal">
            <OglModel name="Visual" src="@../../ProtalMesh" />
            <RigidMapping input="@.." output="@Visual" index="0"/>
        </Node>
    </Node>

    <Node name="tool">
        <MechanicalObject template="Rigid3d" name="DOFs" position="@../HADevice.positionDevice"/>

        <Node name="Instrument" >
            <EulerImplicitSolver name="cg_odesolver"  />
            <SparseLUSolver name="linear solver" iterations="25" tolerance="1e-09" threshold="1e-09" />

            <MechanicalObject name="instrumentState" template="Rigid3d" />
            <UniformMass name="mass" totalMass="1.0" />

            <LCPForceFeedback activate="true" forceCoef="0.0001"/>
            <RestShapeSpringsForceField stiffness='1000000000000' angularStiffness='1000000000000' external_rest_shape='@../DOFs' points='0' external_points='0' />
            <UncoupledConstraintCorrection/>

            <Node name="CollisionModel" tags="toolCollision">
                <MeshObjLoader filename="./mesh/Grasper.obj"  name="loader"/>
                <MeshTopology src="@loader" name="InstrumentCollisionModel" />
                <MechanicalObject src="@loader" name="instrumentCollisionState"  ry="0" rz="0" dz="0" tags="toolPosition"/>
                <SphereCollisionModel name="instrumentPoint" radius="0.2" contactStiffness="10" tags="CarvingTool" />
                <LineCollisionModel />
                <RigidMapping name="MM->CM mapping" input="@instrumentState" output="@instrumentCollisionState" />
            </Node>

            <Node name="VisualModel" >
                <MeshObjLoader name="meshLoader_1" filename="./mesh/Grasper.obj" handleSeams="1" />
                <OglModel name="InstrumentVisualModel" src="@meshLoader_1"/>
                <RigidMapping name="MM->VM mapping" input="@instrumentState" output="@InstrumentVisualModel" />
            </Node>
        </Node>
    </Node>


    <Node name="Cube_0">
        <MeshGmshLoader name="loader" filename="mesh/cube_low_res.msh" scale3d="10 10 10" translation="140 40 40"/>
        <MechanicalObject src="@loader" name="Volume" />

        <TetrahedronSetTopologyContainer name="Tetra_topo" src="@loader" />
        <TetrahedronSetTopologyModifier name="Modifier" />
        <TetrahedronSetTopologyAlgorithms name="TopoAlgo" template="Vec3d" />
        <TetrahedronSetGeometryAlgorithms name="GeomAlgo" template="Vec3d" drawTetrahedra="0" drawScaleTetrahedra="0.8"/>

        <Node name="Surface_0">
            <TriangleSetTopologyContainer  name="Container"  fileTopology="" tags=" " />
            <TriangleSetTopologyModifier   name="Modifier" />
            <TriangleSetTopologyAlgorithms name="TopoAlgo"   template="Vec3d" />
            <TriangleSetGeometryAlgorithms name="GeomAlgo"   template="Vec3d" drawTriangles="0"/>
            <Tetra2TriangleTopologicalMapping input="@../Tetra_topo" output="@Container" />

            <TriangleCollisionModel group="1"/>
            <LineCollisionModel group="1"/>

            <Node name="VisuSurface_0">
                <OglModel name="Visual" color="1.000 1.000 1.000 0.6" />
                <BarycentricMapping input="@.." output="@Visual" />
            </Node>
        </Node>
    </Node>

    <Node name="Cube_1">
        <MeshGmshLoader name="loader" filename="mesh/cube_low_res.msh" scale3d="10 10 10" translation="140 110 0"/>
        <MechanicalObject src="@loader" name="Volume" />

        <TetrahedronSetTopologyContainer name="Tetra_topo" src="@loader" />
        <TetrahedronSetTopologyModifier name="Modifier" />
        <TetrahedronSetTopologyAlgorithms name="TopoAlgo" template="Vec3d" />
        <TetrahedronSetGeometryAlgorithms name="GeomAlgo" template="Vec3d" drawTetrahedra="0" drawScaleTetrahedra="0.8"/>

        <Node name="Surface_1">
            <TriangleSetTopologyContainer  name="Container"  fileTopology="" tags=" " />
            <TriangleSetTopologyModifier   name="Modifier" />
            <TriangleSetTopologyAlgorithms name="TopoAlgo"   template="Vec3d" />
            <TriangleSetGeometryAlgorithms name="GeomAlgo"   template="Vec3d" drawTriangles="0"/>
            <Tetra2TriangleTopologicalMapping input="@../Tetra_topo" output="@Container" />

            <TriangleCollisionModel group="1"/>
            <LineCollisionModel group="1"/>

            <Node name="VisuSurface_1">
                <OglModel name="Visual" color="1.000 1.000 1.000 0.6" />
                <BarycentricMapping input="@.." output="@Visual" />
            </Node>
        </Node>
    </Node>


    <!--
    <Node name="MeshVolume" >
        <RegularGridTopology name="HexaTop" n="7 7 7" min="80 -20 0" max="180 80 100" />
        <TetrahedronSetTopologyContainer name="Container" position="@HexaTop.position" />
        <TetrahedronSetTopologyModifier name="Modifier"/>
        <Hexa2TetraTopologicalMapping input="@HexaTop" output="@Container" swapping="false" />
	</Node>

    <Node name="Cube">
        <EulerImplicitSolver rayleighMass="0.1" rayleighStiffness="0.1" />
        <CGLinearSolver name="linear solver" iterations="25" tolerance="1e-09" threshold="1e-09" />

        <TetrahedronSetTopologyContainer name="ContainerTetra" src="@../MeshVolume/Container" />
        <TetrahedronSetTopologyModifier name="Modifier" />
        <TetrahedronSetTopologyAlgorithms name="TopoAlgo"  template="Vec3d" />
        <TetrahedronSetGeometryAlgorithms name="GeomAlgo"  template="Vec3d" drawTetrahedra="1"/>

        <MechanicalObject name="dof" src="@../MeshVolume/Container"/>
        <UniformMass totalMass="1" />
        <TetrahedronFEMForceField youngModulus="6000" poissonRatio="0.45" topology="@ContainerTetra"/>

        <BoxROI name="box" box="70 -30 -10 190 -19 110" drawBoxes="true" />
        <FixedConstraint  name="FixedConstraint" indices="@box.indices" activate_projectVelocity="1"/>

        <Node name="Surface" >
			<TriangleSetTopologyContainer name="ContainerTri" position="../dof.position"/>
			<TriangleSetTopologyModifier name="Modifier"/>
            <TriangleSetTopologyAlgorithms name="TopoAlgo"  template="Vec3d" />
            <TriangleSetGeometryAlgorithms name="GeomAlgo"  template="Vec3d" />
            <TriangleCollisionModel />
            <LineCollisionModel />
			<Tetra2TriangleTopologicalMapping input="@../ContainerTetra" output="@ContainerTri"/>


            <Node name="VisuSurface">
                <OglModel name="Visual" color="1.000 1.000 1.000 0.6" />
                <BarycentricMapping input="@.." output="@Visual" />
            </Node>
		</Node>

        <PrecomputedConstraintCorrection recompute="0" fileCompliance="./Cube-1029-0.01.comp" printLog="0"/>
	</Node>
    -->
</Node>
